// SBML level 3 version 1

function function_01(S)
  3*S;
end

function Constant_flux__irreversible(v)
  v;
end
Constant_flux__irreversible is "Constant flux (irreversible)";

model New_Model()
  // New Model_1
  // model units - substance: substance, time: time, volume: volume, area: area, length: length, extent: substance

  // Compartments:
  compartment c1 = 2 volume;

  // Species:
  species s1 in c1 = 1;
  species s1s2 in c1 = 1;
  species s2 in c1 = 1;
  species s3 in c1 = 1;
  species s4 in c1 = 1;

  // Parameters:
  k1 = 0;

  // Reactions:
  reaction: s1 + s2 => s1s2; c1*k1*s1*s2;
  reaction_1: s3 => ; c1*reaction_1_k1*s3;
    reaction_1_k1 = 0.1;
  reaction_2: s4 => ; c1*function_01(s4);

  // Unit definitions:
  unit length = metre;
  unit area = metre^2;
  unit volume = 1e-3 litre;
  unit time = second;
  unit substance = 1e-3 mole;
end
